// COMSOL Multiphysics 6.3.0.290 model "电偶腐蚀相场例子.mph"
// Under-Deposit Corrosion
// This example demonstrates how to model the effect of corrosion product on galvanic corrosion between a magnesium alloy (AE44) and mild steel in contact with brine solution (salt water).
// The deformed boundaries due to both deposition of corrosion product as well as dissolution of magnesium surface are modeled here using the level set and deformed geometry formulations, respectively.
// Outline of the model tree

Parameters
  Eeq_cat = -0.58[V]  // 平衡电位，阴极
  i0_cat = 0.00125[A/m^2]  // 交换电流密度，阴极
  A_cat = -153[mV]  // Tafel 斜率，阴极
  Eeq_an = -1.55[V]  // 平衡电位，阳极
  i0_an = 10^-1[A/m^2]  // 交换电流密度，阳极
  A_an = 50[mV]  // Tafel 斜率，阳极
  ilim_an = 10^2[A/m^2]  // 极限电流密度，阳极
  sigma = 2.5[S/m]  // 电解质电导率
  rho_Mg = 1820[kg/m^3]  // 镁的密度
  M_Mg = 0.02682[kg/mol]  // 镁的分子量
  A = 53.5[N/mm^2]  // Free energy density curvature
  csolid = 67.860[mol/L]  // Average concentration of metal
  csat = 5.1[mol/L]  // Average saturation concentration
  D = 7.05*10^-10[m^2/s]  // Diffusion coefficient
  T = 300[K]  // Temperature
  alpha = 3.848e-4[N]  // phase field gradient energy coefficient
  ww = 4.157[N/mm^2]  // height of the double well potential
  k = 0.001  // Sensitivity parameter
  R = 8.314[J/K/mol]  // Molar gas constant
  Vm = 7.12e-6 [m^3/mol]  // Molar volume of steel
  E0 = 210[GPa]
  lc = 40[um]

Functions
  pw1: Piecewise "分段 1" | funcname = fi0; smooth = contd2; smoothzone = 0.01; pieces = {{-10, -1.48, 0.014}, {-1.48, -1.41, 21.145}, {-1.41, 0, 58.107}}; argunit = V; fununit = A/m^2
  pw2: Piecewise "分段 2" | funcname = fa; smooth = contd2; smoothzone = 0.01; pieces = {{-10, -1.48, 0.021}, {-1.48, -1.41, 0.166}, {-1.41, 0, 0.4}}; argunit = V; fununit = V
  pw3: Piecewise "分段 3" | funcname = fe; smooth = contd2; smoothzone = 0.01; smoothends = on; pieces = {{-10, -1.48, -1.55}, {-1.48, -1.41, -1.48}, {-1.41, 0, -1.41}}; argunit = V; fununit = V
  pw4: Piecewise "分段 4" | funcname = fsigma; pieces = {{0, 1, sigma}, {1, 2, 1e7}}; argunit = 1; fununit = S/m

Variables
  var1 "变量 1"
    i_loc_cat = -i0_cat*10^((-phil-Eeq_cat)/A_cat)  // 阴极极化电流tafel公式
    i_loc_an = i0_an*10^((-phil-Eeq_an)/A_an)  // 阳极极化电流tafel公式
    Rc = 0.5*i_loc_an/F_const
    sigmae1 = 0.1[S/m]*(phi2)+sigma*(1-phi2)
    sigmae2 = fsigma(phi2)
  var2 "变量 2"
    gp = phi2^2*(1-phi2)^2  // double well function g
    hp = -2*phi2^3+3*phi2^2  // double well function h
    M = D/(2*A)  // diffusion mobility
    cSe = csolid/csolid  // normalized equilibrium concentration for solid phase
    cLe = csat/csolid  // normalized equilibrium concentration for liquid phase
    c_n = c/csolid  // normalized concentration
    hpd = -6*(phi2-1)*phi2  // Derivative of h wrt phi
    gpd = 2*phi2*(2*phi2^2-3*phi2+1)  // Derivative of g wrt phi
    L0 = LL  // interface kinematics coefficient
    epsl1 = max(1-phi2,eps)  // Electrolyte volume fraction
    MCu = 0.06355[kg/mol]  // Molar mass of copper
    rhoCu = 8960[kg/m^3]  // Density of copper
    gradpfc = sqrt(phix^2+phiy^2+eps)
    gradpfc1 = 6*phi2*(1-phi2)*gradpfc
    LL = i_loc_an/2/F_const/csolid*LKK
    LKK = 0.0045[m^2/J]
    phi2 = min(max(phi,0),1)
    gradpfc2 = gradpfc*0.75*max((1-phi2*phi2),0)

Geometry
  geom1 "几何 1" (2D, length unit m)
    r1: Rectangle "矩形 1" | size = {0.01, 0.01}; pos = {-0.01, 0}
    r2: Rectangle "矩形 2" | size = {0.01, 0.01+1e-4}; pos = {0, -1e-4}
    uni1: Union "并集 1" | input = r1, r2; intbnd = off; edge = all
    r3: Rectangle "矩形 3" | size = {0.01, 0.003}; pos = {-0.01, -0.003}
    r4: Rectangle "矩形 4" | size = {0.01, 0.0029}; pos = {0, -0.003}
    pol1: Polygon "多边形 1" | type = open; source = table; table = {{0, 0}, {0.01, 0}}
    pol2: Polygon "多边形 2" | type = open; source = table; table = {{0, -0.0021}, {0.005, -0.0021}, {0.01, -0.0021}}
    fin: Finalize "形成联合体"

Physics
  cd: SecondaryCurrentDistribution "二次电流分布" on domains 2-5
    dependent variable phil
    ShapeProperty.order_electricpotentialionicphase = 1
    ShapeProperty.order_electricpotential = 1
    CathodicProtection.EnableCathodicProtectionFeatures = 0
    PhysicsVsMaterialsReferenceElectrodePotential.PhysicsVsMaterialsReferenceElectrodePotential = SHE
    ice1: Electrolyte "电解质 1" (default) | sigmal_mat = userdef; sigmal = sigmae2
    ins1: Insulation "绝缘 1" (default)
    init1: init "初始值 1" (default) | phil = 1.4
    ics1: ElectrolyteCurrentSource "电解质电流源 1" on domains 2-5 | Qli = i_loc_an*gradpfc2
    icd1: ElectrolyteNormalCurrentDensity "电解质电流密度 1" on boundaries 4, 10 | nil = i_loc_cat*(phi<=0.5)
  phi: CoefficientFormPDE "系数形式偏微分方程" on domains 2-5
    dependent variable phi
    ShapeProperty.order = 1
    Units.CustomSourceTermUnit = Pa
    cfeq1: CoefficientFormPDE "系数形式偏微分方程 1" (default)
      c = {alpha, 0, 0, alpha}
      f = 2*A*(c-hp*(cSe-cLe)-cLe)*(cSe-cLe)*hpd-ww*gpd
      da = 1/L0
    zflx1: ZeroFluxBoundary "零通量 1" (default)
    init1: init "初始值 1" (default)
    init2: init "初始值 2" on domains 1, 3, 4 | phi = 1
    dir1: DirichletBoundary "狄利克雷边界条件 1" on boundaries 5, 13 | r = 0
  c: GeneralFormPDE "一般形式偏微分方程" on domains 2-5
    dependent variable c
    ShapeProperty.order = 1
    gfeq1: GeneralFormPDE "一般形式偏微分方程 1" (default)
      f = 0
      Ga = {-D*cx+D*(cSe-cLe)*d(hp,x), -D*cy+D*(cSe-cLe)*d(hp,y)}
      da = 1
    zflx1: ZeroFluxBoundary "零通量 1" (default)
    init1: init "初始值 1" (default)
    init2: init "初始值 2" on domains 1, 3, 4 | c = 1
    dir1: DirichletBoundary "狄利克雷边界条件 1" on boundaries 5, 13 | r = 0

Mesh
  mesh1 "网格 1"
    size: MeshSizeDefault "大小" | table = cfd; hauto = 3
    ftri3: FreeTri "自由三角形网格 3" on domains 4, 5
      size1: Size "大小 1" on entire geometry | hmax = 10[um]; custom = on
    ftri2: FreeTri "自由三角形网格 2" on remaining entities | smoothmaxiter = 4; smoothmaxdepth = 4
      size1: Size "大小 1" on entire geometry | table = cfd; hmax = 3.64E-4; hauto = 3

Studies
  std1 "研究 1"
    time: Transient "瞬态"
      tlist = range(0,12*3600,24*3600*3)
      initialtime = 0
      usertol = on
      initstudy = zero
      notstudy = zero

Solver configurations
  sol1 "解 1" (study std1)
    v1: Variables "因变量 1"
      comp1_phil: Field "电解质电位 (comp1.phil)" | scalemethod = manual; scaleval = 1
    t1: Time "瞬态求解器 1"
      tlist = range(0,12*3600,24*3600*3)
      tout = tsteps
      tstepsstore = 2
      rtol = 0.001
      initialstepbdf = 0.01
      maxstepconstraintbdf = const
      maxstepbdf = 500
      maxorder = 2
      initialstepgenalpha = 0.01
      maxstepconstraintgenalpha = const
      maxstepgenalpha = 1000
      eventout = on
      d1: Direct "直接 1"
      se1: Segregated "分离 1"
        ssDef: SegregatedStep "分离步骤" | segvar = {comp1_phil}; subdtech = auto; maxsubiter = 200
        ss1: SegregatedStep "分离步骤 1" | segvar = {comp1_c, comp1_phi}; subdtech = auto; maxsubiter = 200

Datasets
  dset1: Solution | solution = sol1
  con1: Contour "等值线 1" | data = dset1; expr = phi; levelmethod = levels; level = 0.5

Tables
  tbl1: Table "表格 1"
    X | 阴极极化电流tafel公式
    -0.01 | -24.7698
    -0.00990874 | -24.775
    -0.00981748 | -24.7802
    -0.00972622 | -24.7853
    -0.00963496 | -24.7905
    -0.0095437 | -24.8063
    -0.00945244 | -24.8222
    -0.00936118 | -24.838
    -0.00926992 | -24.8539
    -0.00917866 | -24.8795
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
Plots
  pg1: PlotGroup2D "电解质电位 (cd)" | data = dset1
    surf1: Surface "表面 1" | expr = phil
    str1: Streamline "流线 1" | expr = {cd.Ilx, cd.Ily}; pointtype = arrow; arrowlength = logarithmic
  pg2: PlotGroup2D "二维绘图组 2" | data = dset1
    surf1: Surface "表面 1" | expr = phi
    con1: Contour "等值线 1" | expr = phi; levelmethod = levels; levels = 0.5
  pg3: PlotGroup2D "二维绘图组 3" on domains 1, 3, 4 | data = dset1
    surf2: Surface "表面 2" | expr = 1
    surf1: Surface "表面 1" | expr = phi
    con1: Contour "等值线 1" (disabled) | expr = phi; levelmethod = levels; levels = 0.5
    line1: Line "线 1" (disabled) | expr = 1
      sel1: Selection "选择 1" on boundaries 1, 2, 4, 6-8, 10, 11, 15, 16
  pg4: PlotGroup1D "一维绘图组 4" | data = dset1
    lngr1: LineGraph "线结果图 1" on boundaries 4, 10 | expr = i_loc_cat; xdata = expr; xdataexpr = x
  pg5: PlotGroup2D "二维绘图组 5" | data = con1
    line1: Line "线 1" | expr = i_loc_an

Exports
  plot1: Plot "绘图 1" | filename = C:\Users\admin\Desktop\3天相场电偶腐蚀模拟结果.txt
  data1: Data "数据 1" | data = con1; expr = {phi, i_loc_an}; filename = C:\Users\admin\Desktop\等值线.txt